*HEADING
DASHPOTA overdamped SDOF, ζ=1, |u(T)| ≪ u0
*NODE
1, 0, 0, 0
2, 1, 0, 0
*ELEMENT, TYPE=SPRINGA, ELSET=S
1, 1, 2
*ELEMENT, TYPE=MASS, ELSET=M
2, 2
*ELEMENT, TYPE=DASHPOTA, ELSET=D
3, 1, 2
*SPRING, ELSET=S
100
*MASS, ELSET=M
1.0
*DASHPOT, ELSET=D
20
*BOUNDARY
1, 1, 3
2, 2, 3
*INITIAL CONDITIONS, TYPE=DISPLACEMENT
2, 1, 0.01
*STEP
*DYNAMIC
0.005, 0.6283185307179586
*NODE FILE
U
*END STEP
