*HEADING
GAPUNI closed gap, k=1000, F=10 → u=0.01
*NODE
1, 0, 0, 0
2, 1, 0, 0
*ELEMENT, TYPE=GAPUNI, ELSET=G
1, 1, 2
*GAP, ELSET=G
0.0, 1000
*BOUNDARY
1, 1, 3
2, 2, 3
*STEP
*STATIC
*CLOAD
2, 1, 10
*NODE FILE
U, RF
*END STEP
