*HEADING
*INCLUDE demo
*NODE
1, 0, 0, 0
2, 1000, 0, 0
*ELEMENT, TYPE=T3D2, ELSET=T
1, 1, 2
*INCLUDE, INPUT=include_mat.inp
*SOLID SECTION, ELSET=T, MATERIAL=STEEL
200
*BOUNDARY
1, 1, 3
*STEP
*STATIC
*CLOAD
2, 1, 21000
*NODE FILE
U
*END STEP
