*HEADING
MASS + SPRINGA, f = sqrt(k/m)/(2π) ≈ 1.5915 Hz
*NODE
1, 0, 0, 0
2, 1, 0, 0
*ELEMENT, TYPE=SPRINGA, ELSET=S
1, 1, 2
*ELEMENT, TYPE=MASS, ELSET=M
2, 2
*SPRING, ELSET=S
100
*MASS, ELSET=M
1.0
*BOUNDARY
1, 1, 3
2, 2, 3
*STEP
*FREQUENCY
1
*NODE FILE
U
*END STEP
