*HEADING
NAFEMS LE10 thick plate pressure (quarter, C3D20)
Target: syy(D) = -5.38 MPa at the inner top point on +x
** mesh 6 hoop x 4 radial x 2 thick, node D = 5
*NODE
1, 2000, 0, 0
2, 2000, 0, 150
3, 2000, 0, 300
4, 2000, 0, 450
5, 2000, 0, 600
6, 1982.8897, 130.52619, 0
7, 1982.8897, 130.52619, 300
8, 1982.8897, 130.52619, 600
9, 1931.8517, 258.81905, 0
10, 1931.8517, 258.81905, 150
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*ELEMENT, TYPE=C3D20, ELSET=PLATE
1, 1, 75, 83, 9, 3, 77, 85, 11, 54, 80, 57, 6, 55, 81, 58, 7, 2, 76, 84, 10
2, 3, 77, 85, 11, 5, 79, 87, 13, 55, 81, 58, 7, 56, 82, 59, 8, 4, 78, 86, 12
3, 9, 83, 91, 17, 11, 85, 93, 19, 57, 88, 60, 14, 58, 89, 61, 15, 10, 84, 92, 18
4, 11, 85, 93, 19, 13, 87, 95, 21, 58, 89, 61, 15, 59, 90, 62, 16, 12, 86, 94, 20
5, 17, 91, 99, 25, 19, 93, 101, 27, 60, 96, 63, 22, 61, 97, 64, 23, 18, 92, 100, 26
6, 19, 93, 101, 27, 21, 95, 103, 29, 61, 97, 64, 23, 62, 98, 65, 24, 20, 94, 102, 28
7, 25, 99, 107, 33, 27, 101, 109, 35, 63, 104, 66, 30, 64, 105, 67, 31, 26, 100, 108, 34
8, 27, 101, 109, 35, 29, 103, 111, 37, 64, 105, 67, 31, 65, 106, 68, 32, 28, 102, 110, 36
9, 33, 107, 115, 41, 35, 109, 117, 43, 66, 112, 69, 38, 67, 113, 70, 39, 34, 108, 116, 42
10, 35, 109, 117, 43, 37, 111, 119, 45, 67, 113, 70, 39, 68, 114, 71, 40, 36, 110, 118, 44
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*ELSET, ELSET=TOP
2, 4, 6, 8, 10, 12, 14, 16, 18, 20, 22, 24
26, 28, 30, 32, 34, 36, 38, 40, 42, 44, 46, 48
*NSET, NSET=D
5
*NSET, NSET=YS
1, 2, 3, 4, 5, 54, 55, 56, 75, 76, 77, 78
79, 128, 129, 130, 149, 150, 151, 152, 153, 202, 203, 204
223, 224, 225, 226, 227, 276, 277, 278, 297, 298, 299, 300
301
*NSET, NSET=XS
49, 50, 51, 52, 53, 72, 73, 74, 123, 124, 125, 126
127, 146, 147, 148, 197, 198, 199, 200, 201, 220, 221, 222
271, 272, 273, 274, 275, 294, 295, 296, 345, 346, 347, 348
349
*NSET, NSET=OUTER
297, 298, 299, 300, 301, 302, 303, 304, 305, 306, 307, 308
309, 310, 311, 312, 313, 314, 315, 316, 317, 318, 319, 320
321, 322, 323, 324, 325, 326, 327, 328, 329, 330, 331, 332
333, 334, 335, 336, 337, 338, 339, 340, 341, 342, 343, 344
345, 346, 347, 348, 349
*NSET, NSET=OMID
299, 303, 307, 311, 315, 319, 323, 327, 331, 335, 339, 343
347
*MATERIAL, NAME=STEEL
*ELASTIC
210000, 0.3
*SOLID SECTION, ELSET=PLATE, MATERIAL=STEEL
*BOUNDARY
YS, 2, 2
XS, 1, 1
OUTER, 1, 2
OMID, 3, 3
*STEP
*STATIC
*DLOAD
TOP, P2, -1
*NODE FILE
U
*EL FILE
S
*END STEP
