*HEADING
NAFEMS LE1 elliptic membrane, quadratic triangles CPS6
Target: syy(D) = 92.7 MPa
** mesh 8 x 24 quads x 2 CPS6, node D = 1
*NODE
1, 2000, 0, 0
2, 1998.9292, 32.719083, 0
3, 1995.7178, 65.403129, 0
4, 1990.3695, 98.01714, 0
5, 1982.8897, 130.52619, 0
6, 1973.2867, 162.89547, 0
7, 1961.5706, 195.09032, 0
8, 1947.754, 227.07626, 0
9, 1931.8517, 258.81905, 0
10, 1913.8807, 290.28468, 0
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*ELEMENT, TYPE=CPS6, ELSET=MEM
1, 1, 99, 101, 50, 100, 51
2, 1, 101, 3, 51, 52, 2
3, 3, 101, 103, 52, 102, 53
4, 3, 103, 5, 53, 54, 4
5, 5, 103, 105, 54, 104, 55
6, 5, 105, 7, 55, 56, 6
7, 7, 105, 107, 56, 106, 57
8, 7, 107, 9, 57, 58, 8
9, 9, 107, 109, 58, 108, 59
10, 9, 109, 11, 59, 60, 10
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*ELSET, ELSET=OUTER
337, 339, 341, 343, 345, 347, 349, 351, 353, 355, 357, 359
361, 363, 365, 367, 369, 371, 373, 375, 377, 379, 381, 383
*NSET, NSET=D
1
*NSET, NSET=YS
1, 50, 99, 148, 197, 246, 295, 344, 393, 442, 491, 540
589, 638, 687, 736, 785
*NSET, NSET=XS
49, 98, 147, 196, 245, 294, 343, 392, 441, 490, 539, 588
637, 686, 735, 784, 833
*MATERIAL, NAME=STEEL
*ELASTIC
210000, 0.3
*SOLID SECTION, ELSET=MEM, MATERIAL=STEEL
100
*BOUNDARY
YS, 2, 2
XS, 1, 1
*STEP
*STATIC
*DLOAD
OUTER, P2, -10
*NODE FILE
U
*EL FILE
S
*END STEP
